x := [alt_estimate; speed_estimate] → [alt_estimate; speed_estimate]  # - вектор состояний
F := [1, dt; 0, 1] → [1, dt; 0, 1]  # - матрица перехода состояний
w_state_noise := [1; 1]  # - вектор шумов состояния
u_control_vector := [acc_Z_axis; 0] → [acc_Z_axis; 0]  # - управляющее воздействие
B := [dt^2/2, 0; dt, 0] → [dt^2/2, 0; dt, 0]  # - матрица перехода управляющего воздействия в вектор состояний
P_init := [1, 0; 0, 1] → [1, 0; 0, 1]  # - матрица ковариаций (инициализировать как диагональную матрицу)
Q := [Q_00, Q_01; Q_10, Q_11] → [Q_00, Q_01; Q_10, Q_11]  # - матрица шума акселерометра
R := [R_00; R_10] → [R_00; R_10]  # - матрица шума барометра
H := [1, 0]  # - матрица перехода вектора состояний в область измерений
z := alt_baro → alt_baro
# Обновление вектора состояний
x_half_update := F*x + B*u_control_vector → [acc_Z_axis*dt^2/2 + speed_estimate*dt + alt_estimate; speed_estimate + acc_Z_axis*dt]
x_half_update := [alt_half_update_estimate; speed_half_update_estimate] → [alt_half_update_estimate; speed_half_update_estimate]
# Обновление матрицы ковариаций
P_full_update_prev := [P_full_update_prev_00, P_full_update_prev_01; P_full_update_prev_10, P_full_update_prev_11] → [P_full_update_prev_00, P_full_update_prev_01; P_full_update_prev_10, P_full_update_prev_11]
P_half_update := F*P_full_update_prev*transpose(F) + Q → [
    Q_00 + P_full_update_prev_00 + dt*(P_full_update_prev_01 + P_full_update_prev_11*dt) + P_full_update_prev_10*dt, Q_01 + P_full_update_prev_01 + P_full_update_prev_11*dt;
    Q_10 + P_full_update_prev_10 + P_full_update_prev_11*dt, Q_11 + P_full_update_prev_11
]
P_half_update := [P_half_update_00, P_half_update_01; P_half_update_10, P_half_update_11] → [P_half_update_00, P_half_update_01; P_half_update_10, P_half_update_11]
# Обновление коэффициентов усиления фильтра
K := F*P_half_update*transpose(H)*(H*P_half_update*transpose(H))^-1 → [(P_half_update_00 + P_half_update_10*dt)/P_half_update_00; P_half_update_10/P_half_update_00]
K := P_half_update*transpose(H)*(H*P_half_update*transpose(H))^-1 → [1; P_half_update_10/P_half_update_00]  # - использовать эту матрицу ???
K := [K_00_alt; K_10_speed] → [K_00_alt; K_10_speed]
# Обновление оценки с помощью измерений
x_full_update := x_half_update + K*(z - H*x_half_update) → [
    alt_half_update_estimate + K_00_alt*(alt_baro - alt_half_update_estimate);
    speed_half_update_estimate + K_10_speed*(alt_baro - alt_half_update_estimate)
]
x_full_update := [alt_full_update_estimate; speed_full_update_estimate] → [alt_full_update_estimate; speed_full_update_estimate]
# Обновление матрицы ковариаций
# P_full_update := (I - K*H)*P_half_update - формула для обновления матрицы ковариаций
I := [1, 0; 0, 1] → [1, 0; 0, 1]  # - единичиная матрица
first := I*P_half_update → [P_half_update_00, P_half_update_01; P_half_update_10, P_half_update_11]
second := K*H*P_half_update → [
    K_00_alt*P_half_update_00, K_00_alt*P_half_update_01;
    K_10_speed*P_half_update_00, K_10_speed*P_half_update_01
]
P_full_update := first - second → [
    P_half_update_00 - K_00_alt*P_half_update_00, P_half_update_01 - K_00_alt*P_half_update_01;
    P_half_update_10 - K_10_speed*P_half_update_00, P_half_update_11 - K_10_speed*P_half_update_01
]
# - или эквивалентная форма записи:
P_full_update := (I - K*H)*P_half_update → [
    -(P_half_update_00*(K_00_alt - 1)), -(P_half_update_01*(K_00_alt - 1));
    P_half_update_10 - K_10_speed*P_half_update_00, P_half_update_11 - K_10_speed*P_half_update_01
]
